V := 75 gal/min
D := 2.07 in
v := 4*V/(π*D^2)
mPa := 1*10^-3 Pa
ρ := 998 kg/m^3
μ := 10*(mPa*s)
ρ*v*D/μ = 11435.6
v*D/μ = 11.4585 m^3/kg
75 kg*(10 gm/kg) = 1.65347 lb
L := 600 ft
ρ_water := 998 kg/m^3
mPa := 10^-3 Pa
A := π*D^2/4 = 0.00217119 m^2
Q := 75 gal/min
μ := 1.002*10^-3 kg/(m*s)
V_avg := Q/A = 7.15007 ft/s
Re_H2O := ρ_water*V_avg*D/μ = 114128
ε := .045 mm
ε_Cu := .0015 mm
solve block
    # guess values
    f_ss.40 := .7
    # constraints
    1/sqrt(f_ss.40) == -2*log(ε/(D*3.7) + 2.51/(Re_H2O*sqrt(f_ss.40)))
    # solver
    f_ss.40 := find(f_ss.40) = 0.0213953
end solve block
solve block
    # guess values
    f_Cu := .7
    # constraints
    1/sqrt(f_Cu) == -2*log(ε_Cu/(D*3.7) + 2.51/(Re_H2O*sqrt(f_Cu)))
    # solver
    f_Cu := find(f_Cu) = 0.0176689
end solve block
ΔP_ss.40 := ρ_water*f_ss.40*L*V_avg^2/(2*D) = 25.5807 psi
ΔP_Cu := ρ_water*f_Cu*L*V_avg^2/(2*D) = 21.1253 psi
(ΔP_ss.40 - ΔP_Cu)/ΔP_ss.40 = 0.17417
(ΔP_ss.40 - ΔP_Cu)/ΔP_Cu = 0.210902
gal/min = 6.30902e-5 m^3/s
