1 == z_i/(1 - VoF*(1 - K_i)) + (1 - z_i)/(1 - VoF*(1 - K_j)) solve, VoF → [0; (K_j + K_i*z_i - z_i*K_j - 1)/(K_i + K_j - K_i*K_j - 1)]
(z_i*(1 - K_i) + z_j*(1 - K_j))/((1 - K_i)*(1 - K_j)) simplify → -z_i/(K_j - 1) - z_j/(K_i - 1)
(2*R*sqrt(2))^3/4 → 4*sqrt(2)*R^3
(4*R/sqrt(3))^3/2 → 32*sqrt(3)*R^3/9
A := 127.3 gm/mol
ρ := 9.23 gm/cm^3
R := .142 nm
R - nthroot(A/(ρ*N_A*4*sqrt(2)), 3) = -0.0173799 nm
R - nthroot(A*9/(ρ*N_A*32*sqrt(3)), 3) = -0.0129301 nm
R - nthroot(A/(ρ*N_A*8), 3) = 8.64193e-6 nm
