# (75gal/min0.133681ft3/gal)8(3n+1)n(2.067ft)3n4K2.067ft<250 psi/600 ft.42 psi/ft
D := 2 in
L := 600 ft
mPa := 10^-3 Pa
A := π*D^2/4 = 0.00202683 m^2
Q := 65.7 gal/min
V_avg := Q/A = 6.70957 ft/s
V_avg = 4.57471 mph
ρ_water := 998 kg/m^3
f_ss.40 := .7
ρ_water*f_ss.40*L*V_avg^2/(2*D) = 762.785 psi
μ := 1.002 mPa*s
Re_H2O := ρ_water*V_avg*D/μ = 103475
