# [reference: water-properties.mcdx]
p_steam := 217155.457 Pa
T_w.in := 328.5 K
T_w.out := 344.26 K
T_s := T_sat.water(p_steam) = 396.046 K
V_dot.w := 38.23 gpm
D_o := 6.35 mm
T := .89 mm
D_i := D_o - 2*T = 4.57 mm
N_tubes := 56
H := Δh_v.water(T_s) = 39553.5 J/mol
