# Furfuryl Alcohol
T_b := 443.2 K
F_val := [
    "OH", 1, 0.0741, 0.0112, 28;
    "CH2", 1, 0.0189, 0, 56;
    "Oring", 1, 0.0098, 0.0048, 13;
    ">C=", 1, 0.0143, 0.0008, 32;
    "CH=", 3, 0.0082, 0.0011, 41
]
n := 4
n_a := 13
dm := 0.1 m
kmol := 1000 mol
T_c := T_b/(0.584 + 0.965*sum(F_val[i, 1]*F_val[i, 2], i = 0 .. n) - sum(F_val[i, 1]*F_val[i, 2], i = 0 .. n)^2) = 632.545 K
P_c := 1 bar/(0.113 + 0.0032*n_a - sum(F_val[i, 1]*F_val[i, 3], i = 0 .. n))^2 = 5527840 Pa
V_c := (17.5 + sum(F_val[i, 1]*F_val[i, 4], i = 0 .. n))*dm^3/kmol = 0.0002695 m^3/mol
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# m-dinitrobenzene
dm := 0.1 m
T_b := 443.2 K
kmol := 1000 mol
F_val := [
    "OH", 1, 0.0741, 0.0112, 28;
    "CH2", 1, 0.0189, 0, 56;
    "Oring", 1, 0.0098, 0.0048, 13;
    ">C=", 1, 0.0143, 0.0008, 32;
    "CH=", 4, 0.0082, 0.0011, 41
]
n := 4
n_a := 13
kJ := 1000 J
T_c := T_b/(0.584 + 0.965*sum(F_val[i, 1]*F_val[i, 2], i = 0 .. n) - sum(F_val[i, 1]*F_val[i, 2], i = 0 .. n)^2) = 627.599 K
P_c := 1 bar/(0.113 + 0.0032*n_a - sum(F_val[i, 1]*F_val[i, 3], i = 0 .. n))^2 = 5619379 Pa
V_c := (17.5 + sum(F_val[i, 1]*F_val[i, 4], i = 0 .. n))*dm^3/kmol = 0.0003105 m^3/mol
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DH := ["Cb-H-2Cb", 4, 6.53; "Cb-NO2-2Cb", 1, -32.5; "Cb-Cl-2Cb", 1, -32]
ΔH_f := kJ/mol*sum(DH[i, 1]*DH[i, 2], i = 0 .. 2) = -38.38 kJ/mol
ΔH_fDippr := -40.056*kJ/mol
(ΔH_f - ΔH_fDippr)/ΔH_fDippr = -4.18414 %
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# T.b
n := 6
Nan := [
    "CH3-(e)", 1, 251.8338;
    "CH3-(ne)", 2, 177.3066;
    "C(c)H2", 1, 239.4531;
    "C(c)H", 1, 240.6785;
    "C-O-C", 1, 146.4836
]
T_b := (sum(Nan[i, 1]*Nan[i, 2], i = 0 .. rows(Nan) - 1)/(n^0.6583 + 1.6868) + 84.3395)*K = 333.968 K
T_b.DIPPR := 332.15 K
(T_b - T_b.DIPPR)/T_b.DIPPR = 0.547221 %
n := 6
Nan := [
    "CH3-(e)", 1, 251.8338;
    "CH3-(ne)", 2, 177.3066;
    "C(c)H2", 1, 239.4531;
    "C(c)H", 1, 240.6785;
    "C-O-C", 1, 146.4836
]
T_b := (sum(Nan[i, 1]*Nan[i, 2], i = 0 .. rows(Nan) - 1)/(n^0.6583 + 1.6868) + 84.3395)*K = 333.968 K
T_b.DIPPR := 332.15 K
(T_b - T_b.DIPPR)/T_b.DIPPR = 0.547221 %
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W_mat := [
    0, 1, 2, 2, 2, 3, 4, 4;
    1, 0, 1, 1, 1, 2, 3, 3;
    2, 1, 0, 2, 2, 3, 4, 4;
    2, 1, 2, 0, 2, 3, 4, 4;
    2, 1, 2, 2, 0, 1, 2, 2;
    3, 2, 3, 3, 1, 0, 1, 1;
    4, 3, 4, 4, 2, 1, 0, 2;
    4, 3, 4, 4, 2, 1, 2, 0
]
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n_c := 9
W_mat := [
    0, 1, 2, 2, 2, 3, 3, 4, 4;
    1, 0, 1, 1, 1, 2, 2, 3, 3;
    2, 1, 0, 2, 2, 3, 3, 4, 4;
    2, 1, 2, 0, 2, 3, 3, 4, 4;
    2, 1, 2, 2, 0, 1, 1, 2, 2;
    3, 2, 3, 3, 1, 0, 2, 1, 3;
    3, 2, 3, 3, 1, 2, 0, 3, 1;
    4, 3, 4, 4, 2, 1, 3, 0, 4;
    4, 3, 4, 4, 2, 3, 1, 4, 0
]
w_b := 1/2*sum(sum(W_mat[i, j], j = 0 .. rows(W_mat) - 1), i = 0 .. rows(W_mat) - 1) = 88
Pb_2 := match(3, W_mat)
p_b := rows(Pb_2)/2 = 10
w_n := 120
p_n := 6
T_b.w := (1209.59 - 1162.91/(1 + 0.074189*n_c^0.85) - 96.52*((w_n - w_b)/n_c^2) - 5.45*(p_n - p_b))*K = 407.629 K
T_b.DIPPR := 406.99 K
(T_b.w - T_b.DIPPR)/T_b.DIPPR = 0.156908 %
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δ := [1; 3; 3; 2; 2; 5; 1; 1]
Χ_1v := 1/sqrt(δ[0]*δ[1]) + 1/sqrt(δ[1]*δ[2]) + 1/sqrt(δ[1]*δ[6]) + 1/sqrt(δ[2]*δ[3]) + 1/sqrt(δ[2]*δ[7]) + 1/sqrt(δ[3]*δ[4]) + 1/sqrt(δ[4]*δ[5]) = 3.28986
S := 10^(6.52 - 2.61*Χ_1v)*mol/dm^3 = 8.57956 mol/m^3
MW := 0.116*kg/mol
S*MW = 0.995229 gm/L
